*Heading
** Job name: UNNOTCHED Model name: Model-1
** Generated by: Abaqus/CAE 6.13-1
*Preprint, echo=NO, model=NO, history=NO, contact=NO
**
** PARTS
**
*Part, name=Part-1
*End Part
**
**
** ASSEMBLY
**
*Assembly, name=Assembly
**
*Instance, name=Part-1-1, part=Part-1
*Node
      1,          10.,         -40.,           4.
      2,         -10.,         -40.,           4.
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*Element, type=C3D8R
    1,   187,   555,    14,     1,  4068,  4436,  3895,  3882
    2,   555,   556,    15,    14,  4436,  4437,  3896,  3895
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*Nset, nset=Set-1, generate
     1,  19405,      1
*Elset, elset=Set-1, generate
     1,  14516,      1
** Section: Section-1
*Solid Section, elset=Set-1, material=Aluminum
,
*End Instance
**
*Node
      1,           0.,           0.,           0.
*Node
      2,           0.,          25.,           0.
*Node
      3,           0.,         -25.,           0.
*Node
      4,           0.,        -100.,           4.
*Node
      5,           0.,         100.,           4.
*Nset, nset=CLIP_GAUGE, instance=Part-1-1
 3589, 3864
*Nset, nset=LOAD
 4,
*Nset, nset=LOAD_TOP
 5,
*Nset, nset=Set-2
 4,
*Nset, nset=Set-3, instance=Part-1-1
     7,     9,   275,   276,   277,   278
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*Elset, elset=Set-3, instance=Part-1-1
  2927,  2928,  2929,  2930,  2931,  2932
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*Nset, nset=Set-4, instance=Part-1-1
     7,     9,   275,   276,   277,   278
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*Elset, elset=Set-4, instance=Part-1-1
  2927,  2928,  2929,  2930,  2931,  2932
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*Nset, nset=m_Set-1
 4,
*Nset, nset=m_Set-8
 5,
*Elset, elset=_s_Surf-1_S3, internal, instance=Part-1-1
  1453,  1454,  1455,  1456,  1457,  1458
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*Surface, type=ELEMENT, name=s_Surf-1
_s_Surf-1_S3, S3
*Elset, elset=_s_Surf-2_S3, internal, instance=Part-1-1
  2927,  2928,  2929,  2930,  2931,  2932
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*Surface, type=ELEMENT, name=s_Surf-2
_s_Surf-2_S3, S3
** Constraint: Constraint-Bottom
*Coupling, constraint name=Constraint-Bottom, ref node=m_Set-1, surface=s_Surf-1
*Kinematic
** Constraint: Constraint-Top
*Coupling, constraint name=Constraint-Top, ref node=m_Set-8, surface=s_Surf-2
*Kinematic
*End Assembly
*Amplitude, name=Amp-1
             0.,              0.,             0.1,             0.1,             0.2,             0.2,             0.3,             0.3
            0.4,             0.4,             0.5,             0.5,             0.6,             0.6,             0.7,             0.7
            0.8,             0.8,             0.9,             0.9,              1.,              1.
**
** MATERIALS
**
** Aluminum alloy AlCuMg1 EN AW 2017
**
** Hardening Law:
** Sigma_y = Sima_0 + R_0 * Epsilon_pl + R_inf(1 -  e^(-b*Epsilon_pl)
** Sigma_0 = 329 Mpa
** R_0 = 120 MPa
** R_inf = 190 Mpa
** b = 15
*Material, name=Aluminum
*Density
 2.78e-09,
*Elastic
70000., 0.3
*Plastic
    260.,          0.
 281.379, 0.000496659
  295.86, 0.000724965
 306.295,  0.00106101
 316.527,  0.00163766
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    550.,         0.5
**
** BOUNDARY CONDITIONS
**
** Name: BC-Encastre Type: Symmetry/Antisymmetry/Encastre
*Boundary
Set-2, ENCASTRE
** Name: BC-Top Type: Displacement/Rotation
*Boundary
Set-3, 1, 1
Set-3, 3, 3
Set-3, 4, 4
Set-3, 5, 5
Set-3, 6, 6
** ----------------------------------------------------------------
**
** STEP: Step-1
**
*Step, name=Step-1, nlgeom=YES
*Dynamic, Explicit
, 1.
*Bulk Viscosity
0.06, 1.2
** Mass Scaling: Semi-Automatic
**               Whole Model
*Fixed Mass Scaling, factor=150.
**
** LOADS
**
** Name: Load-1   Type: Concentrated force
*Cload, amplitude=Amp-1
LOAD_TOP, 2, 9000.
**
** OUTPUT REQUESTS
**
*Restart, write, number interval=1, time marks=NO
**
** FIELD OUTPUT: F-Output-1
**
*Output, field, number interval=100
*Node Output
CF, RF, U
*Element Output, directions=YES
MISESONLY, PE, PEEQ, PRESSONLY, S, TRIAX
**
** HISTORY OUTPUT: H-Output-1
**
*Output, history, variable=PRESELECT
*End Step
